// SBML level 3 version 1
// dcterms:bibliographicCitation: http://identifiers.org/pubmed/15173220

function Function_for_PIP2_5Pase(MgSat20, PIP2_M, kPIP2Pase)
  MgSat20*kPIP2Pase*PIP2_M;
end

function Function_for_MgonGDPAIF4(GGDPAlF4_M, M, Mg2_C, kMgonAlF4)
  kMgonAlF4*GGDPAlF4_M*Mg2_C*M;
end

function Function_for_MgGTPon(GGTP_M, M, Mg2_C, kMg2onGTP)
  kMg2onGTP*GGTP_M*Mg2_C*M;
end

function Function_for_PI4Kinase(ATPSat1000, M, MgSat20, PI_M, kPI4Kinase)
  (0.2 + 0.8*MgSat20)*kPI4Kinase*PI_M*ATPSat1000*M;
end

function Function_for_PIP2binding(KCNQsites_M, PIP2_M, PIP2xKCNQ_M, kPIP2off, kPIP2on)
  kPIP2on*KCNQsites_M*PIP2_M + (-(kPIP2off*PIP2xKCNQ_M));
end

function Function_for_IP3Phosphatase(NA_micro, ip3_C, kIP3ase)
  ip3_C*kIP3ase*NA_micro;
end

function Function_for_PLC(M, PIP2_M, PLCspont, fGactive, kPLC)
  kPLC*(fGactive + PLCspont)*PIP2_M*M;
end

function Function_for_AIF4on(AlF4_C, GGDPAlF4_M, GGDP_M, M, kAlF4off, kAlF4on)
  (kAlF4on*AlF4_C*GGDP_M + (-(kAlF4off*GGDPAlF4_M)))*M;
end

function Function_for_GGTPase(GGTPMg_M, MgSat10, kGGTPase)
  kGGTPase*MgSat10*GGTPMg_M;
end

function Function_for_PIP5kinase(ATPSat300, MgSat20, PIP_M, kPIP5Kinase)
  (0.2 + 0.8*MgSat20)*kPIP5Kinase*PIP_M*ATPSat300;
end

function Function_for_GDPdissoc(GDP_C, GGDP_M, G_M, M, OxoSat, TonicAct, kGDPoff, kGDPon)
  (kGDPoff*GGDP_M*(OxoSat + TonicAct) + (-(kGDPon*GDP_C*G_M)))*M;
end

function Function_for_GTPon(GGTP_M, GTP_C, G_M, M, kGTPoff, kGTPon)
  (kGTPon*G_M*GTP_C + (-(kGTPoff*GGTP_M)))*M;
end

function Function_for_GTPgSon(GGTPgS_M, GTPgS_C, G_M, M, kGTPgSoff, kGTPgSon)
  (kGTPgSon*G_M*GTPgS_C + (-(kGTPgSoff*GGTPgS_M)))*M;
end

function Function_for_GDPbSon(GDPbS_C, GGDPbS_M, G_M, M, OxoSat, kGDPbSon, kGGDPbSoff)
  (kGDPbSon*G_M*GDPbS_C + (-(kGGDPbSoff*(1 + 20*OxoSat)*GGDPbS_M)))*M;
end

function Function_for_MgonGGTPgS(GGTPgS_M, M, Mg2_C, kMg2onGTPgS)
  kMg2onGTPgS*GGTPgS_M*Mg2_C*M;
end

model Suh2004_KCNQ_regulation()
  // Suh2004_KCNQ_Regulation
  // The model reproduces FIG 11A and FIG 11B of the paper. However, please note that FIG 11B is a plot of normalised amounts versus time. The "stoichiometry" field has been used to convert fluxes from membrane species to volume species. The value of 0.0009967 is a product of (Surface to Volume_M*(1/Avagadro's number)*1E21. 0.6 is the surface to volume ratio of the plasma membrane, 1E21 is required for a unit surface to volume ratio and the Avagadro's number is present in the denominator to convert molecules to moles. The model was successfully tested using MathSBML and SBML ODESolver.
  // All the kinetic laws have the unit items per second , which requires the one reaction taking place in the cytoplasm - IP3Phosphatase - to include an explicit conversion factor both in the kinetic law and the stoichiometry of IP3_C . The kinetic law is multiplied and the stoichiometry divided by the number of molecules per micro-mole. This conversion factor is only required for correct units and can be replaced by 1, if it should lead to numerical problems.
  // To the extent possible under law, all copyright and related or neighbouring rights to this encoded model have been dedicated to the public domain worldwide. Please refer to CC0 Public Domain Dedication for more information.
  // In summary, you are entitled to use this encoded model in absolutely any manner you deem suitable, verbatim, or with modification, alone or embedded it in a larger context, redistribute it, commercially or not, in a restricted way or not.
  // To cite BioModels Database, please use: Li C, Donizelli M, Rodriguez N, Dharuri H, Endler L, Chelliah V, Li L, He E, Henry A, Stefan MI, Snoep JL, Hucka M, Le Novère N, Laibe C (2010) BioModels Database: An enhanced, curated and annotated resource for published quantitative kinetic models. BMC Syst Biol., 4:92.
  // biomodels.db:MODEL4662889298 biomodels.db:BIOMD0000000081
  // hasPart GO:0007207
  // hasPart GO:0006629
  // biomodels.db:MODEL4662889298
  // kegg.pathway:map04020
  // biomodels.db:BIOMD0000000081
  // model units - substance: substance, time: time, volume: volume, area: area, length: length, extent: substance

  // Compartments:
  compartment EX = 1 volume; EX is "Extracellular";  // GO:0005576
  compartment M = 1 volume; M is "Membrane";  // 2-D; GO:0005886
  compartment Cytoplasm = 1 volume;  // GO:0005737

  // Species:
  species GTPgS_C in Cytoplasm = 0;  // kegg.compound:C01806; CHEBI:5235
  species KCNQsites_M in M = 6.7;  // hasPart uniprot:O88944; hasPart uniprot:O43526
  species PIP2_M in M = 5000;  // CHEBI:18348; kegg.compound:C04637
  species GGDPbS_M in M = 0;  // hasPart CHEBI:38309; hasPart GO:0005834
  species $Mg2_C in Cytoplasm = 2100;  // CHEBI:25107; kegg.compound:C00305
  species ATP_C in Cytoplasm = 3000;  // kegg.compound:C00002; CHEBI:15422
  species oxoM_EX in EX = 0;  // CHEBI:38322
  species GDPbS_C in Cytoplasm = 0;  // isVersionOf CHEBI:38309
  species GGTPMg_M in M = 0.1;  // hasPart kegg.compound:C00044; hasPart kegg.compound:C00305; hasPart GO:0005834; hasPart CHEBI:18420
  species GDP_C in Cytoplasm = 0;  // kegg.compound:C00035; CHEBI:17552
  species $GTP_C in Cytoplasm;  // CHEBI:15996; kegg.compound:C00044
  species GGDPAlF4Mg_M in M = 0; GGDPAlF4Mg_M is "GGDPAIF4Mg_M";  // hasPart uniprot:P29992; hasPart kegg.compound:C00305; hasPart kegg.compound:C00035; hasPart CHEBI:30111
  species ip3_C in Cytoplasm = 0.48; ip3_C is "IP3_C";  // CHEBI:16595; kegg.compound:C01245
  species AlF4_C in Cytoplasm = 0; AlF4_C is "AIF4_C";  // CHEBI:30111
  species G_M in M = 0.065;  // GO:0005834
  species GGTP_M in M = 0.048;  // hasPart GO:0005834; hasPart CHEBI:15996; hasPart kegg.compound:C00044
  species GGDPAlF4_M in M = 0; GGDPAlF4_M is "GGDPAIF4_M";  // hasPart kegg.compound:C00035; hasPart GO:0005834; hasPart CHEBI:17552; hasPart CHEBI:30111
  species GGTPgS_M in M = 0;  // hasPart GO:0005834; hasPart CHEBI:43000; hasPart CHEBI:5235; hasPart kegg.compound:C01806
  species PI_M in M = 200000;  // CHEBI:16749; kegg.compound:C01194
  species PIP_M in M = 1150;  // CHEBI:17526; kegg.compound:C01277
  species PIP2xKCNQ_M in M = 33.3;  // hasPart uniprot:O88944; hasPart CHEBI:18348; hasPart kegg.compound:C04637; hasPart uniprot:O43526
  species GGTPgSMg_M in M = 0;  // hasPart kegg.compound:C00305; hasPart CHEBI:5235; hasPart CHEBI:25107; hasPart kegg.compound:C01806
  species GGDP_M in M = 200;  // hasPart GO:0005834; hasPart CHEBI:17552; hasPart kegg.compound:C00035

  // Parameters:
  MgSat20 has unit_0;
  ATPSat300 has unit_0;
  MgSat10 has unit_0;
  OxoSat has unit_0;
  Gactive has unit_1;
  ATPSat1000 has unit_0;
  KMgGTPase = 10 unit_2;
  Koxom = 8 unit_2;
  I_KCNQ has unit_0;
  nHill = 1.8 unit_0;
  fGactive has unit_0;
  NA_micro = 6.022e17 unit_3; NA_micro is "NA(micro)";

  // Assignment rules:
  MgSat10 := 0.2 + 0.8*1*(1/(1 + KMgGTPase*(1/Mg2_C)));
  I_KCNQ := 1.33*(0.025*PIP2xKCNQ_M)^nHill;
  ATPSat300 := 1*(1/(1 + 300*(1/(0.5 + ATP_C))));
  GTP_C := 100 - 50*exp(-(0.008333333*(290 + time)));
  ATPSat1000 := 1*(1/(1 + 1000*(1/(0.5 + ATP_C))));
  fGactive := (GGTPMg_M + GGTPgSMg_M + GGDPAlF4Mg_M)/200;
  OxoSat := 1*(1/(1 + Koxom*(1/(1e-5 + oxoM_EX))));
  MgSat20 := 1*(1/(1 + 20*(1/Mg2_C)));
  Gactive := GGTPMg_M + GGTPgSMg_M + GGDPAlF4Mg_M;

  // Reactions:
  PIP5kinase: 0.0009967 ATP_C + PIP_M -> PIP2_M; Function_for_PIP5kinase(ATPSat300, MgSat20, PIP_M, kPIP5Kinase);  // kegg.reaction:R03469; isVersionOf ec-code:2.7.1.68; isVersionOf GO:0016308
    kPIP5Kinase = 0.06;
  IP3Phosphatase: 1.666111e-18 ip3_C -> ; Cytoplasm*Function_for_IP3Phosphatase(NA_micro, ip3_C, kIP3ase);  // kegg.reaction:R03394; isVersionOf ec-code:3.1.3.56; isVersionOf GO:0004445
    kIP3ase = 0.3;
  PIP2binding: KCNQsites_M + PIP2_M -> PIP2xKCNQ_M; M*Function_for_PIP2binding(KCNQsites_M, PIP2_M, PIP2xKCNQ_M, kPIP2off, kPIP2on);  // isVersionOf GO:0005267; isVersionOf GO:0005546
    kPIP2off = 0.25; kPIP2on = 0.00025;
  MgonGGTPgS: GGTPgS_M -> GGTPgSMg_M; Function_for_MgonGGTPgS(GGTPgS_M, M, Mg2_C, kMg2onGTPgS);  // modifiers: Mg2_C; isPartOf GO:0031684
    kMg2onGTPgS = 0.002;
  GGTPase: GGTPMg_M -> GGDP_M; M*Function_for_GGTPase(GGTPMg_M, MgSat10, kGGTPase);  // isVersionOf GO:0003924
    kGGTPase = 1.8;
  GTPon: G_M -> GGTP_M; Function_for_GTPon(GGTP_M, GTP_C, G_M, M, kGTPoff, kGTPon);  // modifiers: GTP_C; isPartOf GO:0031684
    kGTPoff = 0.08; kGTPon = 0.45;
  GTPgSon: 0.0009967 GTPgS_C + G_M -> GGTPgS_M; Function_for_GTPgSon(GGTPgS_M, GTPgS_C, G_M, M, kGTPgSoff, kGTPgSon);  // isPartOf GO:0031684
    kGTPgSoff = 0.005; kGTPgSon = 0.006;
  GDPbSon: G_M + 0.0009967 GDPbS_C -> GGDPbS_M; Function_for_GDPbSon(GDPbS_C, GGDPbS_M, G_M, M, OxoSat, kGDPbSon, kGGDPbSoff);  // isPartOf GO:0031684
    kGDPbSon = 0.28; kGGDPbSoff = 0.1;
  MgGTPon: GGTP_M -> GGTPMg_M; Function_for_MgGTPon(GGTP_M, M, Mg2_C, kMg2onGTP);  // modifiers: Mg2_C; isPartOf GO:0031684
    kMg2onGTP = 0.003;
  GDPdissoc: GGDP_M -> 0.0009967 GDP_C + G_M; Function_for_GDPdissoc(GDP_C, GGDP_M, G_M, M, OxoSat, TonicAct, kGDPoff, kGDPon);  // modifiers: oxoM_EX; isPartOf GO:0031684
    TonicAct = 0.002; kGDPoff = 0.5; kGDPon = 0.003;
  PIP2_5Pase: PIP2_M -> PIP_M; M*Function_for_PIP2_5Pase(MgSat20, PIP2_M, kPIP2Pase);  // kegg.reaction:R04404; isVersionOf ec-code:3.1.3.36; isVersionOf GO:0004439
    kPIP2Pase = 0.005;
  PLC: PIP2_M -> 0.0009967 ip3_C; Function_for_PLC(M, PIP2_M, PLCspont, fGactive, kPLC);  // kegg.reaction:R03435; isVersionOf ec-code:3.1.4.11; isVersionOf GO:0004435; isVersionOf GO:0007200
    PLCspont = 0.00075; kPLC = 4.8;
  AlF4on: 0.0009967 AlF4_C + GGDP_M -> GGDPAlF4_M; Function_for_AIF4on(AlF4_C, GGDPAlF4_M, GGDP_M, M, kAlF4off, kAlF4on); AlF4on is "AIF4on";  // isPartOf GO:0031684
    kAlF4off = 0.005; kAlF4on = 7e-6;
  PI4Kinase: 0.0009967 ATP_C + PI_M -> PIP_M; Function_for_PI4Kinase(ATPSat1000, M, MgSat20, PI_M, kPI4Kinase);  // kegg.reaction:R03361; isVersionOf ec-code:2.7.1.67; isVersionOf GO:0004430
    kPI4Kinase = 0.0001;
  MgonGDPAlF4: GGDPAlF4_M -> GGDPAlF4Mg_M; Function_for_MgonGDPAIF4(GGDPAlF4_M, M, Mg2_C, kMgonAlF4); MgonGDPAlF4 is "MgonGDPAIF4";  // modifiers: Mg2_C; isPartOf GO:0031684
    kMgonAlF4 = 0.002;

  // Events:
  event_0000001_0: at (time >= 3): oxoM_EX = 10;
  event_0000002_0: at (time >= 8): oxoM_EX = 0;

  // Unit definitions:
  unit length = metre;
  unit area = (1e-6 metre)^2;
  unit volume = litre;
  unit time = second;
  unit substance = item;
  unit unit_0 = dimensionless^0; unit_0 is "1";
  unit unit_1 = item / (1000000 metre)^2; unit_1 is "#/Mm²";
  unit unit_2 = (1e-6 dimensionless)^0 * item * avogadro / litre; unit_2 is "µmol/l";
  unit unit_3 = 1 / (1000000 avogadro); unit_3 is "1/MAvogadro";
end
