// SBML level 2 version 4
// dcterms:bibliographicCitation: urn:miriam:pubmed:24824602
// dcterms:bibliographicCitation: urn:miriam:doi:10.1371/journal.pone.0097130

function Constant_flux__irreversible(v)
  v;
end
Constant_flux__irreversible is "Constant flux (irreversible)";

function Henri_Michaelis_Menten__irreversible(substrate, Km, V)
  V*substrate/(Km + substrate);
end
Henri_Michaelis_Menten__irreversible is "Henri-Michaelis-Menten (irreversible)";

function function_for_ERG(k, M, J)
  k/(1 + (M/J)^2);
end

function function_1k_1m(k, M)
  k*M;
end

function function_for_DRG(k, P, J)
  k*(P/J)^2/(1 + (P/J)^2);
end

function function_1k_2m(k, M1, M2)
  k*M1*M2;
end

function function_2k_1m(k1, M, k2)
  k1*M*k2;
end

function function_for_actCycACdk1(k0, k1, k2, M1, k3, M2, M3)
  k0*(k1 + k2*M1 + k3*M2)*M3*2;
end

function function_for_actCycACdk2_1(k0, k1, k2, M1, k3, M2, M3)
  (1 - k0)*(k1 + k2*M1 + k3*M2)*M3*2;
end

function function_for_actCycACdk2_2(k0, k1, k2, M)
  (1 - k0)*(k1 + k2)*M;
end

function function_2k_2m(k1, M1, M2, k2)
  k1*M1*M2*k2;
end

function function_for_2k(k1, k2)
  k1*k2;
end

function function_for_Cdh1_1(k1, k2, M, P, k3)
  (k1 + k2*M)*(1 - P)/(k3 + 1 - P);
end

function function_for_cdh1_2(k1, M1, M2, k2, M3, S, k3)
  (k1*(M1 + M2) + k2*M3)*S/(k3 + S);
end

function function_for_APCP_1(k1, M, P, k2)
  k1*M*(1 - P)/(k2 + 1 - P);
end

function function_for_Cdc20A(k1, M1, M2, P, k2)
  k1*M1*(M2 - P)/(k2 + M2 - P);
end

function function_for_Cdc20T(k1, M1, k2, M2)
  k1*M1/(k2 + M2);
end

model Weis2014___Data_driven_Mammalian_Cell_Cycle_Model()
  // Weis2014 - Data driven Mammalian Cell Cycle Model
  // This a model from the article:
  // A Data-Driven, Mathematical Model of Mammalian Cell Cycle Regulation.
  // Michael C. Weis, Jayant Avva, James W. Jacobberger, Sree N. Sreenath PLoS ONE 2014 May 13: 9(5): e97130 24824602 ,
  // Abstract:
  // Progression of a cell through the division cycle is tightly controlled at different steps to ensure the integrity of genome replication and partitioning to daughter cells. From published experimental evidence, we propose a molecular mechanism for control of the cell division cycle in Caulobacter crescentus. The mechanism, which is based on the synthesis and degradation of three ‘‘master regulator’’ proteins (CtrA, GcrA, and DnaA), is converted into a quantitative model, in order to study the temporal dynamics of these and other cell cycle proteins. The model accounts for important details of the physiology, biochemistry, and genetics of cell cycle control in stalked C. crescentus cell. It reproduces protein time courses in wild-type cells, mimics correctly the phenotypes of many mutant strains, and predicts the phenotypes of currently uncharacterized mutants. Since many of the proteins involved in regulating the cell cycle of C. crescentus are conserved among many genera of a-proteobacteria, the proposed mechanism may be applicable to other species of importance in agriculture and medicine.
  // In summary, you are entitled to use this encoded model in absolutely any manner you deem suitable, verbatim, or with modification, alone or embedded it in a larger context, redistribute it, commercially or not, in a restricted way or not..
  // To cite BioModels Database, please use: Li C, Donizelli M, Rodriguez N, Dharuri H, Endler L, Chelliah V, Li L, He E, Henry A, Stefan MI, Snoep JL, Hucka M, Le Novère N, Laibe C (2010) BioModels Database: An enhanced, curated and annotated resource for published quantitative kinetic models. BMC Syst Biol., 4:92.
  // biomodels.db:MODEL1811220001 biomodels.db:BIOMD0000000723
  // isVersionOf ncit:C38794
  // isVersionOf GO:0007049
  // hasTaxon taxonomy:9606
  // isDescribedBy pubmed:24824602
  // isDescribedBy doi:10.1371/journal.pone.0097130

  // Compartments:
  compartment cell = 1;  // isVersionOf ncit:C12958

  // Species:
  species ERG in cell = 0;  // isVersionOf uniprot:P11308
  species DRG in cell = 0;  // isVersionOf uniprot:P11308
  species ppRB in cell = 14.08011;  // isVersionOf uniprot:P06400
  species E2F in cell = 0.716055;  // isVersionOf CCO:42550
  species pE2F in cell = 1.388537;  // isVersionOf CCO:42550
  species Rb in cell = 0.1071;  // isVersionOf uniprot:P06400
  species E2FRB in cell = 0.27627;  // isVersionOf CCO:42550; isVersionOf GO:0035189
  species pE2FRB in cell = 0.53642;  // isVersionOf CCO:42550; isVersionOf uniprot:P06400
  species actCycD in cell = 0;  // isVersionOf uniprot:P30279; isVersionOf uniprot:P24385
  species TriD in cell = 0;  // isVersionOf uniprot:P30279
  species actCycACdk1 in cell = 0.003801726;  // isVersionOf uniprot:P20248; isVersionOf uniprot:P06493
  species actCycACdk2 in cell = 0.04296969;  // isVersionOf uniprot:P20248; isVersionOf uniprot:P24941
  species actCycB in cell = 0.01;  // isVersionOf uniprot:Q8WWL7
  species actCycE in cell = 0.045866;  // isVersionOf uniprot:P24864; isVersionOf uniprot:O96020
  species cycA in cell = 0.067925;  // isVersionOf uniprot:P20248
  species cycB in cell = 2.3652;  // isVersionOf uniprot:Q8WWL7
  species cycE in cell = 0.072513;  // isVersionOf uniprot:O96020; isVersionOf uniprot:P24864
  species CKI in cell = 0.60183432;  // isVersionOf uniprot:P46527
  species Cdh1 in cell = 0.99736;  // isVersionOf uniprot:P12830
  species preMPF in cell = 2.3552058;  // hasVersion uniprot:P20248; hasVersion uniprot:P06493; hasVersion uniprot:P14635
  species TriA in cell = 0.0211544;  // isVersionOf uniprot:P20248
  species APCP in cell = 0.81078;  // isVersionOf PR:000026433; isVersionOf GO:0005680
  species Cdc20A in cell = 0.2727;  // isVersionOf uniprot:Q12834
  species Cdc20T in cell = 0.27315;  // isVersionOf uniprot:Q12834
  species mass in cell = 1;  // isVersionOf ncit:C43246

  // Parameters:
  a1frac = 0.081283;
  FB = 2;
  FE = 25;
  J15 = 0.1;
  J17 = 0.3;
  J20 = 100;
  Ja20 = 0.005;
  Ja25 = 0.005;
  JaAPC = 0.01;
  Jafb = 0.01;
  Jah1 = 0.15;
  Jatf = 0.01;
  Jawee = 0.05;
  Jaweeb = 0.05;
  Ji20 = 0.005;
  Ji25 = 0.031623;
  JiAPC = 0.001;
  Jifb = 0.001;
  Jih1 = 0.01;
  Jitf = 0.01;
  Jiwee = 0.05;
  k10 = 88.175;
  k15 = 5.2905;
  k16 = 44.0875;
  k17 = 2645.25;
  k17p = 2.64525;
  k18 = 176.35;
  K19 = 35.27;
  K19a = 440.875;
  K20 = 176.35;
  K21 = 1;
  K22 = 3.527;
  K23a = 0.17635;
  K23b = 1.7635;
  k24 = 1763.5;
  k25p = 61.474;
  k25pp = 3.051596e4;
  K26 = 17635;
  K26R = 35.27;
  k9 = 45.851;
  ka20 = 292.669;
  ka25 = 8.85277;
  kaAPC = 2.33401;
  kacdh1 = 264.525;
  kafab = 0.296268;
  kah1p = 155.8708;
  kah1pp = 176350;
  kasa = 1.973357e4;
  kase = 1.973357e4;
  katfpp = 58.70692;
  katfppp = 97.80724;
  katfpppp = 77.63935;
  kaweep = 13.8188;
  kd20 = 17.635;
  kdap = 0.516094;
  kdapp = 2645.25;
  kdbp = 0.853181;
  kdbpp = 176.35;
  kdbppp = 387.97;
  kde2fcdc20 = 881.75;
  kde2fcdh1 = 1.7635;
  kdep = 1.961012;
  kdepp = 1.973357;
  kdeppp = 176.35;
  kdepppp = 3527;
  kdia = 196.0783;
  kdie = 196.0783;
  kdip = 196.0783;
  kdipp = 978.0688;
  kdippp = 1960.837;
  kdipppp = 978.0688;
  ke2f = 4.2324;
  ki20 = 17.635;
  ki25 = 35.27;
  kiAPC = 3.862259;
  kifb = 9.827456;
  kih1pp = 17635;
  kih1ppp = 1763.5;
  kitfp = 48.96181;
  kitfpp = 19.60836;
  kitfppp = 19.60836;
  kiwee = 0.145;
  ks20pp = 105.81;
  ksap = 16.75325;
  ksapp = 0.10581;
  ksappp = 20.28025;
  ksbp = 6.7013;
  ksbpp = 15.8715;
  ksbppp = 1.7635;
  ksbpppp = 0.617225;
  ksep = 1.562461;
  ksepp = 8.8175;
  ksip = 390.9926;
  kweep = 234.8312;
  kweepp = 17635;
  LA = 30;
  LB = 0.5;
  LD = 3.3;
  LE = 10;
  PP1T = 1;
  u = 0.693937;
  k24r = 176.35;
  kiweeb = 5;

  // Assignment rules:
  v29 := E2FRB*K20*((actCycD + TriD)*LD + LA*(actCycACdk1 + actCycACdk2) + LB*actCycB + LE*actCycE);
  v30 := pE2FRB*K20*(LD*(actCycD + TriD) + LA*(actCycACdk1 + actCycACdk2) + LB*actCycB + LE*actCycE);
  v43 := Rb*K20*(LD*(actCycD + TriD) + LA*(actCycACdk1 + actCycACdk2) + LB*actCycB + LE*actCycE);
  v45 := K26R*E2FRB;
  v46 := E2F*(K23a*(actCycACdk1 + actCycACdk2) + K23b*actCycB);
  v47 := K22*pE2F;
  v48 := K26*E2F*Rb;
  v49 := K26R*pE2FRB;
  v50 := K26*Rb*pE2F;
  v51 := K22*pE2FRB;
  v52 := E2FRB*(K23a*(actCycACdk1 + actCycACdk2) + K23b*actCycB);
  Vatf := katfpp*(actCycACdk1 + actCycACdk2) + katfppp*actCycE + katfpppp*actCycD;
  Vde := kdep + kdepp*actCycE + kdeppp*(actCycACdk1 + actCycACdk2) + kdepppp*actCycB;
  Vda := kdap + kdapp*Cdc20A + kacdh1*Cdh1;
  TFAB := 2*kafab*(actCycACdk1 + actCycACdk2)*Jifb/(kifb - kafab*(actCycACdk1 + actCycACdk2) + Jafb*kifb + kafab*(actCycACdk1 + actCycACdk2)*Jifb + sqrt((kifb - kafab*(actCycACdk1 + actCycACdk2) + Jafb*kifb + kafab*(actCycACdk1 + actCycACdk2)*Jifb)^2 - 4*(kifb - kafab*(actCycACdk1 + actCycACdk2))*Jifb*kafab*(actCycACdk1 + actCycACdk2)));
  Vsb := ksbp + ksbpp*TFAB + ksbppp*actCycB + ksbpppp*E2F;
  Vsi := ksip;
  Vdb := kdbp + kdbpp*Cdh1 + kdbppp*Cdc20A;
  Wee1 := 2*kaweep*Jiwee/(kiwee*(actCycACdk1 + actCycACdk2) + kiweeb*actCycB - kaweep + Jawee*(kiwee*(actCycACdk1 + actCycACdk2) + kiweeb*actCycB) + kaweep*Jiwee + sqrt((kiwee*(actCycACdk1 + actCycACdk2) + kiweeb*actCycB - kaweep + Jawee*(kiwee*(actCycACdk1 + actCycACdk2) + kiweeb*actCycB) + kaweep*Jiwee)^2 - 4*(kiwee*(actCycACdk1 + actCycACdk2) + kiweeb*actCycB - kaweep)*kaweep*Jawee));
  Cdc25 := 2*ka25*actCycB*Ji25/(ki25 - ka25*actCycB + Ja25*ki25 + Ji25*ka25*actCycB + sqrt((ki25 - ka25*actCycB + Ja25*ki25 + Ji25*ka25*actCycB)^2 - 4*(ki25 - ka25*actCycB)*Ja25*ka25*actCycB));
  Vwee := kweep + kweepp*Wee1;
  Vdi := kdip + kdipp*(actCycACdk1 + actCycACdk2) + kdippp*actCycB + kdipppp*actCycE;
  V25 := k25p + k25pp*Cdc25;
  TriE := cycE - actCycE;
  freeCK1 := CKI - TriA - TriE - TriD;
  CdkCycBCK1 := cycB - actCycB - preMPF;
  Cdk1PCycB := cycB - actCycB;
  PP1A := PP1T/(K21*(FE*(actCycACdk1 + actCycACdk2 + actCycE) + FB*actCycB + 1));
  v44 := ppRB*(K19a*(PP1T - PP1A) + K19*PP1A);

  // Reactions:
  reaction: => ERG; cell*function_for_ERG(k15, DRG, J15); reaction is "ERG synthesis";  // modifiers: DRG
  ERG_degradation: ERG => ; cell*k16*ERG;
  DRG_synthesis_through_ERG: => DRG; cell*function_1k_1m(k17p, ERG);  // modifiers: ERG
  DRG_synthesis: => DRG; cell*function_for_DRG(k17, DRG, J17);
  DRG_degradation: DRG => ; cell*k18*DRG;
  E2FRB_complex_dissociation: E2FRB => ppRB + E2F; cell*Constant_flux__irreversible(v29);
  E2FRB_complex_dissociation_2: pE2FRB => ppRB + pE2F; cell*Constant_flux__irreversible(v30);
  double_phosphorylation_of_Rb: Rb => ppRB; cell*Constant_flux__irreversible(v43);
  dephosphorylation_of_Rb: ppRB => Rb; cell*Constant_flux__irreversible(v44);
  E2FRB_complex_dissociation_3: E2FRB => E2F + Rb; cell*Constant_flux__irreversible(v45);
  dephosphorylation_of_E2F: pE2F => E2F; cell*Constant_flux__irreversible(v47);
  E2f_phosphorylation: E2F => pE2F; cell*Constant_flux__irreversible(v46);
  E2FRB_complex_formation: E2F + Rb => E2FRB; cell*Constant_flux__irreversible(v48);
  E2F_synthesis: => E2F; cell*function_1k_2m(ke2f, mass, E2F);  // modifiers: mass
  E2F_degradation_through_Cdc20: E2F => ; cell*function_1k_2m(kde2fcdc20, E2F, Cdc20A);  // modifiers: Cdc20A
  E2F_degradation_through_Cdh1: E2F => ; cell*function_1k_2m(kde2fcdh1, Cdh1, E2F);  // modifiers: Cdh1
  reaction_16: pE2FRB => pE2F + Rb; cell*Constant_flux__irreversible(v49); reaction_16 is "phosphorylated E2FRB complex dissociation";
  reaction_17: pE2F + Rb => pE2FRB; cell*Constant_flux__irreversible(v50); reaction_17 is "phosphorylated E2FRB complex formation";
  pE2F_degradation_through_Cdc20: pE2F => ; cell*function_1k_2m(kde2fcdc20, pE2F, Cdc20A);  // modifiers: Cdc20A
  pE2F_degradation_through_Cdh1: pE2F => ; cell*function_1k_2m(kde2fcdh1, pE2F, Cdh1);  // modifiers: Cdh1
  E2FRB_dephosphorylation: pE2FRB => E2FRB; cell*Constant_flux__irreversible(v51);
  E2FRB_phosphorylation: E2FRB => pE2FRB; cell*Constant_flux__irreversible(v52);
  active_cyclin_D_synthesis: => actCycD; cell*function_1k_1m(k9, DRG);  // modifiers: DRG
  cyclin_D_activation_1: TriD => actCycD; cell*function_1k_1m(Vdi, TriD);
  cyclin_D_activation_2: TriD => actCycD; cell*function_1k_1m(k24r, TriD);
  active_cyclin_D_inactivation: actCycD => TriD; cell*function_2k_1m(k24, actCycD, freeCK1);
  active_cyclin_D_degradation: actCycD => ; cell*k10*actCycD;
  inactive_cyclin_D_degradation: TriD => ; cell*k10*TriD;
  actCycACdk1_formation_1: => actCycACdk1; cell*function_for_actCycACdk1(a1frac, ksap, ksapp, E2F, ksappp, TFAB, mass);  // modifiers: E2F, mass
  actCycACdk1_formation_2: => actCycACdk1; cell*function_2k_1m(a1frac, TriA, Vdi);  // modifiers: TriA
  actCycACdk1_formation_3: => actCycACdk1; cell*function_2k_1m(a1frac, TriA, kdia);  // modifiers: TriA
  actCycACdk1_degradation_1: actCycACdk1 => ; cell*Vda*actCycACdk1;
  actCycACdk1_degradation_2: actCycACdk1 => ; cell*function_2k_1m(kasa, actCycACdk1, freeCK1);
  actCycACdk2_formation_1: => actCycACdk2; cell*function_for_actCycACdk2_1(a1frac, ksap, ksapp, E2F, ksappp, TFAB, mass);  // modifiers: E2F, mass
  actCycACdk2_formation_2: => actCycACdk2; cell*function_for_actCycACdk2_2(a1frac, Vdi, kdia, TriA);  // modifiers: TriA
  actCycACdk2_degradation_1: actCycACdk2 => ; cell*Vda*actCycACdk2;
  actCycACdk2_degradation_2: actCycACdk2 => ; cell*function_2k_1m(kasa, actCycACdk2, freeCK1);
  cyclinB_synthesis: => actCycB + cycB; cell*function_2k_1m(Vsb, mass, cyclinB_synthesis_k2);  // modifiers: mass
    cyclinB_synthesis_k2 = 2;
  active_cyclin_B_synthesis: => actCycB; cell*function_1k_1m(V25, cycB);  // modifiers: cycB
  active_cyclinB_degradation_1: actCycB => ; cell*V25*actCycB;
  active_cyclinB_degradation_2: actCycB => ; cell*Vdb*actCycB;
  active_cyclinB_degradation_3: actCycB => ; cell*Vwee*actCycB;
  cyclinE_synthesis_1: => actCycE + cycE; cell*function_2k_1m(ksep, mass, cyclinE_synthesis_1_k2);  // modifiers: mass
    cyclinE_synthesis_1_k2 = 2;
  cyclinE_synthesis_2: => actCycE + cycE; cell*function_2k_2m(ksepp, E2F, mass, cyclinE_synthesis_2_k2);  // modifiers: E2F, mass
    cyclinE_synthesis_2_k2 = 2;
  active_cyclin_E_synthesis_1: => actCycE; cell*function_for_2k(Vdi, TriE);
  active_cyclin_E_synthesis_2: => actCycE; cell*function_for_2k(kdie, TriE);
  active_cyclin_E_degradation_1: actCycE => ; cell*Vde*actCycE;
  active_cyclin_E_degradation_2: actCycE => ; cell*function_2k_1m(kase, actCycE, freeCK1);
  cyclinA_synthesis: => cycA; cell*function_for_actCycACdk1(k0, ksap, ksapp, E2F, ksappp, TFAB, mass);  // modifiers: E2F, mass
    k0 = 1;
  cyclinA_degradation: cycA => ; cell*Vda*cycA;
  cyclinB_degradation: cycB => ; cell*Vdb*cycB;
  cyclinE_degradation: cycE => ; cell*Vde*cycE;
  CKI_synthesis: => CKI; cell*Constant_flux__irreversible(Vsi);
  CKI_degradation: CKI => ; cell*Vdi*CKI;
  Cdh1_synthesis: => Cdh1; cell*function_for_Cdh1_1(kah1p, kah1pp, Cdc20A, Cdh1, Jah1);  // modifiers: Cdc20A
  Cdh1_degradation: Cdh1 => ; cell*function_for_cdh1_2(kih1pp, actCycACdk1, actCycACdk2, kih1ppp, actCycB, Cdh1, Jih1);  // modifiers: actCycACdk1, actCycACdk2, actCycB
  preMPF_synthesis: => preMPF; cell*function_1k_1m(Vwee, cycB);  // modifiers: cycB
  preMPF_degradation_1: preMPF => ; cell*Vwee*preMPF;
  preMPF_degradation_2: preMPF => ; cell*V25*preMPF;
  preMPF_degradation_3: preMPF => ; cell*Vdb*preMPF;
  TriA_synthesis: => TriA; cell*function_2k_1m(kasa, cycA, freeCK1);  // modifiers: cycA
  TriA_degradation_1: TriA => ; cell*function_2k_1m(kasa, TriA, freeCK1);
  TriA_degradation_2: TriA => ; cell*kdia*TriA;
  TriA_degradation_3: TriA => ; cell*Vda*TriA;
  TriA_degradation_4: TriA => ; cell*Vdi*TriA;
  APCP_synthesis: => APCP; cell*function_for_APCP_1(kaAPC, actCycB, APCP, JaAPC);  // modifiers: actCycB
  APCP_degradation: APCP => ; cell*Henri_Michaelis_Menten__irreversible(APCP, JiAPC, kiAPC);
  active_Cdc20_synthesis: => Cdc20A; cell*function_for_Cdc20A(ka20, APCP, Cdc20T, Cdc20A, Ja20);  // modifiers: APCP, Cdc20T
  active_Cdc20_degradation_1: Cdc20A => ; cell*Henri_Michaelis_Menten__irreversible(Cdc20A, Ji20, ki20);
  active_Cdc20_degradation_2: Cdc20A => ; cell*kd20*Cdc20A;
  Cdc20T_degradation_1: => Cdc20T; cell*function_for_Cdc20T(ka20, actCycB, J20, actCycB);  // modifiers: actCycB
  Cdc20T_degradation_2: Cdc20T => ; cell*kd20*Cdc20T;
  reaction_72: => mass; cell*function_1k_1m(u, mass); reaction_72 is "mass";

  // Unit definitions:
  unit volume = 1e-3 litre;
  unit time = 3600 second;
  unit substance = 1e-3 mole;
end
